#
# Note : check consistency of area unit and length units in this file
# Note : check consistency with inertia units of the .mass file
#
#
Dynamic Analysis
0.0                                 | Mach
0     0     0.0                     | iYsym  iZsym  Zsym
  0.08001     0.12969     0.63000   | Sref   Cref   Bref
  0.07879     0.00000     0.00697   | Xref   Yref   Zref
 0.00                               | CDp  (optional)


#========TODO: REMOVE OR MODIFY MANUALLY DUPLICATE SECTIONS IN SURFACE DEFINITION=========
SURFACE                      | (keyword)
Main Wing
#Nchord    Cspace   [ Nspan Sspace ]
13        1.0

INDEX                        | (keyword)
6368                         | Lsurf

YDUPLICATE
0.0

SCALE
1.0  1.0  1.0

TRANSLATE
0.0  0.0  0.0

ANGLE
   0.000                         | dAinc


#____PANEL 1_______
#______________
SECTION                                                     |  (keyword)
   0.0000    0.0000    0.0000    0.1590   0.000   19    3   | Xle Yle Zle   Chord Ainc   [ Nspan Sspace ]

AFIL 0.0 1.0
S1223.dat


#______________
SECTION                                                     |  (keyword)
   0.0640    0.3127    0.0384    0.0950   0.000   19    3   | Xle Yle Zle   Chord Ainc   [ Nspan Sspace ]

AFIL 0.0 1.0
S1223.dat


#========TODO: REMOVE OR MODIFY MANUALLY DUPLICATE SECTIONS IN SURFACE DEFINITION=========
SURFACE                      | (keyword)
Elevator
#Nchord    Cspace   [ Nspan Sspace ]
7        1.0

INDEX                        | (keyword)
6370                         | Lsurf

YDUPLICATE
0.0

SCALE
1.0  1.0  1.0

TRANSLATE
0.0  0.0  0.0

ANGLE
   0.000                         | dAinc


#____PANEL 1_______
#______________
SECTION                                                     |  (keyword)
   0.4000    0.0000    0.0000    0.1050   0.000   19    1   | Xle Yle Zle   Chord Ainc   [ Nspan Sspace ]

AFIL 0.0 1.0
NACA 0012.dat


#______________
SECTION                                                     |  (keyword)
   0.4410    0.1390    0.0000    0.0630   0.000   19    1   | Xle Yle Zle   Chord Ainc   [ Nspan Sspace ]

AFIL 0.0 1.0
NACA 0012.dat


#========TODO: REMOVE OR MODIFY MANUALLY DUPLICATE SECTIONS IN SURFACE DEFINITION=========
SURFACE                      | (keyword)
Fin
#Nchord    Cspace   [ Nspan Sspace ]
7        1.0

INDEX                        | (keyword)
6371                         | Lsurf

SCALE
1.0  1.0  1.0

TRANSLATE
0.0  0.0  0.0

ANGLE
   0.000                         | dAinc


#____PANEL 1_______
#______________
SECTION                                                     |  (keyword)
   0.4370   -0.0000    0.1100    0.0550   0.000    7    0   | Xle Yle Zle   Chord Ainc   [ Nspan Sspace ]

AFIL 0.0 1.0
NACA 0012.dat


#______________
SECTION                                                     |  (keyword)
   0.4000    0.0000    0.0000    0.0920   0.000    7    0   | Xle Yle Zle   Chord Ainc   [ Nspan Sspace ]

AFIL 0.0 1.0
NACA 0012.dat
